*HEADING
Low-floor chassis AW3 vertical proof-load screen
*NODE
1,-8250.000000,-1250.000000,350.000000
2,-7350.000000,-1250.000000,350.000000
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*NSET,NSET=ALLN
1,2,3,4,5,6
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*ELSET,ELSET=ALLE
1,2,3,4,5,6
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*ELEMENT,TYPE=B31,ELSET=SIDE_TORSION_BOX
1,1,2
2,2,3
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*ELEMENT,TYPE=B31,ELSET=STRINGER
21,23,24
22,24,25
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*ELEMENT,TYPE=B31,ELSET=KEEL_BOX
39,43,44
40,44,45
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*ELEMENT,TYPE=B31,ELSET=UPPER_CHORD
57,63,64
58,64,65
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*ELEMENT,TYPE=B31,ELSET=CROSS_BEARER
75,1,83
76,83,84
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*ELEMENT,TYPE=B31,ELSET=TORSION_TIE
99,97,98
106,102,103
113,107,108
120,112,113
127,117,118
*ELEMENT,TYPE=B31,ELSET=BOLSTER
146,128,129
147,130,131
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*MATERIAL,NAME=S355
*ELASTIC
210000.0,0.300
*BEAM SECTION,ELSET=SIDE_TORSION_BOX,MATERIAL=S355,SECTION=RECT
240.000000,430.000000
0.000000,0.000000,-1.000000
*BEAM SECTION,ELSET=STRINGER,MATERIAL=S355,SECTION=RECT
165.000000,260.000000
0.000000,0.000000,-1.000000
*BEAM SECTION,ELSET=KEEL_BOX,MATERIAL=S355,SECTION=RECT
150.000000,250.000000
0.000000,0.000000,-1.000000
*BEAM SECTION,ELSET=UPPER_CHORD,MATERIAL=S355,SECTION=RECT
90.000000,145.000000
0.000000,0.000000,-1.000000
*BEAM SECTION,ELSET=CROSS_BEARER,MATERIAL=S355,SECTION=RECT
125.000000,220.000000
0.000000,0.000000,-1.000000
*BEAM SECTION,ELSET=TORSION_TIE,MATERIAL=S355,SECTION=RECT
165.000000,180.000000
0.000000,0.000000,-1.000000
*BEAM SECTION,ELSET=BOLSTER,MATERIAL=S355,SECTION=RECT
260.000000,280.000000
0.000000,0.000000,-1.000000
*BOUNDARY
24,1,6,0.000000
34,2,3,0.000000
30,3,3,0.000000
40,3,3,0.000000
*STEP
*STATIC
*CLOAD
23,3,-20000.000000
89,3,-20000.000000
33,3,-20000.000000
24,3,-20000.000000
92,3,-20000.000000
34,3,-20000.000000
25,3,-20000.000000
95,3,-20000.000000
35,3,-20000.000000
26,3,-20000.000000
100,3,-20000.000000
36,3,-20000.000000
27,3,-20000.000000
105,3,-20000.000000
37,3,-20000.000000
28,3,-20000.000000
110,3,-20000.000000
38,3,-20000.000000
29,3,-20000.000000
115,3,-20000.000000
39,3,-20000.000000
30,3,-20000.000000
120,3,-20000.000000
40,3,-20000.000000
31,3,-20000.000000
123,3,-20000.000000
41,3,-20000.000000
*NODE PRINT,NSET=ALLN
U
*EL PRINT,ELSET=ALLE
S
*END STEP
