*HEADING
OSR controlled member screening; mm N MPa
*NODE
1,0,0,0
2,41.40625,0,0
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*ELEMENT,TYPE=B32,ELSET=MEMBER
1,1,2,3
2,3,4,5
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*NSET,NSET=MID
33
*MATERIAL,NAME=STEEL
*ELASTIC
210000,0.3
*BEAM SECTION,ELSET=MEMBER,MATERIAL=STEEL,SECTION=RECT
180,273.6
0,1,0
*BOUNDARY
1,1,4,0
65,2,3,0
*STEP
*STATIC
*CLOAD
33,3,-10000
*NODE PRINT,NSET=MID
U
*EL PRINT,ELSET=MEMBER
S
*END STEP
