*HEADING
Full car body side/roof frame screening model
*NODE
1,-8500.000000,-1350.000000,350.000000
2,-6400.000000,-1350.000000,350.000000
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*NSET,NSET=ALLN
1,2,3,4,5,6
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*ELSET,ELSET=ALLE
1,2,3,4,5,6
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*ELEMENT,TYPE=B31,ELSET=SIDE_SILL
1,1,2
2,2,3
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*ELEMENT,TYPE=B31,ELSET=WAIST_RAIL
9,10,11
10,11,12
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*ELEMENT,TYPE=B31,ELSET=CANT_RAIL
17,19,20
18,20,21
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*ELEMENT,TYPE=B31,ELSET=ROOF_RAIL
25,28,29
26,29,30
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*ELEMENT,TYPE=B31,ELSET=POST
33,1,10
34,10,19
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*ELEMENT,TYPE=B31,ELSET=CROSS_TIE
119,1,37
120,28,64
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*MATERIAL,NAME=S355
*ELASTIC
210000.0,0.300
*BEAM SECTION,ELSET=SIDE_SILL,MATERIAL=S355,SECTION=RECT
170.000000,300.000000
0.000000,0.000000,-1.000000
*BEAM SECTION,ELSET=WAIST_RAIL,MATERIAL=S355,SECTION=RECT
120.000000,105.000000
0.000000,0.000000,-1.000000
*BEAM SECTION,ELSET=CANT_RAIL,MATERIAL=S355,SECTION=RECT
135.000000,170.000000
0.000000,0.000000,-1.000000
*BEAM SECTION,ELSET=ROOF_RAIL,MATERIAL=S355,SECTION=RECT
115.000000,115.000000
0.000000,0.000000,-1.000000
*BEAM SECTION,ELSET=POST,MATERIAL=S355,SECTION=RECT
120.000000,120.000000
1.000000,0.000000,0.000000
*BEAM SECTION,ELSET=CROSS_TIE,MATERIAL=S355,SECTION=RECT
95.000000,135.000000
0.000000,0.000000,-1.000000
*BOUNDARY
2,1,6,0.000000
38,2,3,0.000000
8,3,3,0.000000
44,3,3,0.000000
*STEP
*STATIC
*CLOAD
2,3,-30000.000000
38,3,-30000.000000
3,3,-30000.000000
39,3,-30000.000000
4,3,-30000.000000
40,3,-30000.000000
5,3,-30000.000000
41,3,-30000.000000
6,3,-30000.000000
42,3,-30000.000000
7,3,-30000.000000
43,3,-30000.000000
8,3,-30000.000000
44,3,-30000.000000
29,3,-7500.000000
65,3,-7500.000000
35,3,-7500.000000
71,3,-7500.000000
*NODE PRINT,NSET=ALLN
U
*EL PRINT,ELSET=ALLE
S
*END STEP
