*HEADING
Three-train full-set vertical service screen
*NODE
1,-74250.000000,-1150.000000,720.000000
2,-72150.000000,-1150.000000,720.000000
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*NSET,NSET=ALLN
1,2,3,4,5,6
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*ELSET,ELSET=ALLE
1,2,3,4,5,6
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*ELEMENT,TYPE=B31,ELSET=LONGITUDINAL_SILL
1,1,2
2,2,3
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*ELEMENT,TYPE=B31,ELSET=CENTRE_SPINE
73,75,76
74,76,77
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*ELEMENT,TYPE=B31,ELSET=CROSS_TIE
109,1,38
110,2,39
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*ELEMENT,TYPE=B31,ELSET=TRAIN_TO_TRAIN_LINK
147,114,115
149,118,119
150,13,50
152,122,123
154,126,127
155,25,62
*ELEMENT,TYPE=B31,ELSET=UPPER_GANGWAY_LINK
146,112,113
148,116,117
151,120,121
153,124,125
*MATERIAL,NAME=S355
*ELASTIC
210000.0,0.300
*BEAM SECTION,ELSET=LONGITUDINAL_SILL,MATERIAL=S355,SECTION=RECT
260.000000,430.000000
0.000000,0.000000,-1.000000
*BEAM SECTION,ELSET=CENTRE_SPINE,MATERIAL=S355,SECTION=RECT
220.000000,360.000000
0.000000,0.000000,-1.000000
*BEAM SECTION,ELSET=CROSS_TIE,MATERIAL=S355,SECTION=RECT
150.000000,240.000000
0.000000,0.000000,-1.000000
*BEAM SECTION,ELSET=TRAIN_TO_TRAIN_LINK,MATERIAL=S355,SECTION=RECT
240.000000,300.000000
0.000000,0.000000,-1.000000
*BEAM SECTION,ELSET=UPPER_GANGWAY_LINK,MATERIAL=S355,SECTION=RECT
120.000000,160.000000
0.000000,0.000000,-1.000000
*BOUNDARY
2,1,6,0.000000
39,3,3,0.000000
4,3,3,0.000000
41,3,3,0.000000
6,3,3,0.000000
43,3,3,0.000000
8,3,3,0.000000
45,3,3,0.000000
10,3,3,0.000000
47,3,3,0.000000
12,3,3,0.000000
49,3,3,0.000000
14,3,3,0.000000
51,3,3,0.000000
16,3,3,0.000000
53,3,3,0.000000
18,3,3,0.000000
55,3,3,0.000000
20,3,3,0.000000
57,3,3,0.000000
22,3,3,0.000000
59,3,3,0.000000
24,3,3,0.000000
61,3,3,0.000000
26,3,3,0.000000
63,3,3,0.000000
28,3,3,0.000000
65,3,3,0.000000
30,3,3,0.000000
67,3,3,0.000000
32,3,3,0.000000
69,3,3,0.000000
34,3,3,0.000000
71,3,3,0.000000
36,3,3,0.000000
73,3,3,0.000000
*STEP
*STATIC
*CLOAD
2,3,-10285.714286
128,3,-10285.714286
39,3,-10285.714286
3,3,-10285.714286
129,3,-10285.714286
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151,3,-35000.000000
*NODE PRINT,NSET=ALLN
U
*EL PRINT,ELSET=ALLE
S
*END STEP
