*HEADING
Train-to-train open joint vertical load screen
*NODE
1,-720.000000,-1080.000000,720.000000
2,-720.000000,-1080.000000,760.000000
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*NSET,NSET=ALLN
1,2,3,4,5,6
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*ELSET,ELSET=ALLE
1,2,3,4,5,6
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*ELEMENT,TYPE=B31,ELSET=END_RING
1,1,2
2,2,3
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*ELEMENT,TYPE=B31,ELSET=LOWER_DRAWBAR
48,41,42
50,45,46
*ELEMENT,TYPE=B31,ELSET=THRESHOLD_BRIDGE
45,12,32
46,13,33
47,14,34
*ELEMENT,TYPE=B31,ELSET=UPPER_LINK
49,43,44
51,47,48
*ELEMENT,TYPE=B31,ELSET=PORTAL_TIE
7,1,9
8,9,10
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*MATERIAL,NAME=S355
*ELASTIC
210000.0,0.300
*BEAM SECTION,ELSET=END_RING,MATERIAL=S355,SECTION=RECT
240.000000,360.000000
1.000000,1.000000,1.000000
*BEAM SECTION,ELSET=LOWER_DRAWBAR,MATERIAL=S355,SECTION=RECT
320.000000,420.000000
1.000000,1.000000,1.000000
*BEAM SECTION,ELSET=THRESHOLD_BRIDGE,MATERIAL=S355,SECTION=RECT
240.000000,240.000000
1.000000,1.000000,1.000000
*BEAM SECTION,ELSET=UPPER_LINK,MATERIAL=S355,SECTION=RECT
160.000000,220.000000
1.000000,1.000000,1.000000
*BEAM SECTION,ELSET=PORTAL_TIE,MATERIAL=S355,SECTION=RECT
160.000000,260.000000
1.000000,1.000000,1.000000
*BOUNDARY
1,1,6,0.000000
2,3,3,0.000000
3,3,3,0.000000
4,3,3,0.000000
9,3,3,0.000000
12,3,3,0.000000
15,3,3,0.000000
18,3,3,0.000000
10,3,3,0.000000
13,3,3,0.000000
16,3,3,0.000000
19,3,3,0.000000
11,3,3,0.000000
14,3,3,0.000000
17,3,3,0.000000
20,3,3,0.000000
5,3,3,0.000000
6,3,3,0.000000
7,3,3,0.000000
8,3,3,0.000000
*STEP
*STATIC
*CLOAD
32,3,-10000.000000
35,3,-10000.000000
38,3,-10000.000000
33,3,-10000.000000
36,3,-10000.000000
39,3,-10000.000000
34,3,-10000.000000
37,3,-10000.000000
40,3,-10000.000000
*NODE PRINT,NSET=ALLN
U
*EL PRINT,ELSET=ALLE
S
*END STEP
